*HEADING
cubit(C:/Users/Peter/Desktop/Fidesys/FEM/donut4.inp): 05/31/2019: 15:34:53
version: 16.6b
**
********************************** P A R T S **********************************
*PART, NAME=Part-Default
**
********************************** N O D E S **********************************
*NODE, NSET=ALLNODES
     308,    2.000000e+00,    0.000000e+00
     309,    1.000000e+00,    0.000000e+00
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**
********************************** E L E M E N T S ****************************
*ELEMENT, TYPE=CPS3, ELSET=EB1
     574,     870,     869,     561
     575,     561,     449,     870
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**
********************************** N O D E S E T S **********************************
*NSET, NSET=NS3
     309,     337,     344,     345,     346,     347
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*NSET, NSET=NS5
     309,     337,     344,     345,     346,     347
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*NSET, NSET=NS6
     316,     337,     338,     339,     340,     341,
     342,     343,     532,     535,     539,     658,
     673,     681,     684,
*NSET, NSET=NS7
     308,     309,     310,     311,     312,     313,
     314,     315,     483,     488,     575,     577,
     581,     584,     591,
**
********************************** S I D E S E T S **********************************
*ELSET, ELSET=SS1_S1
     840,     882,     938,     964,    1090,    1120,    1152,    1248,    1280,    1305,
    1316
*ELSET, ELSET=SS1_S2
     842,     881,     937,     966,    1089,    1122,    1154,    1250,    1282,    1304,
    1318
*SURFACE, NAME=SS1
SS1_S1, S1
SS1_S2, S2
*ELSET, ELSET=SS2_S1
     832,     844,     854,     856,     869,     942
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*ELSET, ELSET=SS2_S2
     834,     846,     853,     858,     868,     941
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*SURFACE, NAME=SS2
SS2_S1, S1
SS2_S2, S2
*ELSET, ELSET=SS3_S1
     832,     844,     854,     856,     869,     942
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*ELSET, ELSET=SS3_S2
     834,     846,     853,     858,     868,     941
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*SURFACE, NAME=SS3
SS3_S1, S1
SS3_S2, S2
*ELSET, ELSET=SS4_S1
     840,     882,     938,     964,    1090,    1120,    1152,    1248,    1280,    1305,
    1316
*ELSET, ELSET=SS4_S2
     842,     881,     937,     966,    1089,    1122,    1154,    1250,    1282,    1304,
    1318
*SURFACE, NAME=SS4
SS4_S1, S1
SS4_S2, S2
**
********************************** P R O P E R T I E S ************************
*SHELL SECTION, ELSET=EB1, SECTION INTEGRATION=SIMPSON, MATERIAL=Default-Steel
1.000000e+00
**
*END PART
**
**
**
********************************** E N D   P A R T S **********************************
**
**
********************************** A S S E M B L Y ************************************
**
*ASSEMBLY, NAME=ASSEMBLY1
**
*INSTANCE, NAME=Part-Default_1, PART=Part-Default
*END INSTANCE
**
*END ASSEMBLY
**
**
**
*MATERIAL, NAME = Default-Steel
*ELASTIC, TYPE=ISOTROPIC
2.068000e+05, 2.900000e-01
*DENSITY
7.000000e-06
*CONDUCTIVITY,TYPE=ISO
4.500000e-02
*SPECIFIC HEAT
5.000000e+02
**
**
*BOUNDARY,TYPE=DISPLACEMENT
*BOUNDARY,TYPE=DISPLACEMENT
Part-Default_1.NS6, 1, , 0.000000e+00
*BOUNDARY,TYPE=DISPLACEMENT
Part-Default_1.NS7, 2, , 0.000000e+00
**
*DSLOAD, OP=MOD
Part-Default_1.SS3, P, 2.000000e+00
**
************************************** H I S T O R Y *************************************
**
*PREPRINT
**
**************************************** S T E P 1 ***************************************
*STEP,INC=100,NAME=Default Set
**
*STATIC
1, 1, 1e-05, 1
**
**
**
**
*END STEP
